# Title: Лабораторная работа №1. Исследование надежности структурно-сложных систем
## Лабораторная работа №1. Исследование надежности структурно-сложных систем
# Выполнили студенты: Ястребов-Амирханов Алекси, Ваганова Мария
# Факультет ПИиКТ, группа Р3332
## 1. Исходные параметры и функции надежности элементов
# Зададим интенсивность отказов отдельного элемента системы λ:
λ := 10^-3
# Диапазон времени наработки t (в часах):
t := 0.1 .. 5000
# Вероятность безотказной работы единичного элемента P(t) и вероятность отказа Q(t):
P(t) := e^(-λ*t)
Q(t) := 1 - P(t)
## 2. Точный аналитический расчет вероятности безотказной работы системы
# 1) Аналитический расчет надежности мостиковой структуры R(t) перебором состояний:
R(t) := P(t)^5 + 5*(1 - P(t))*P(t)^4 + 8*(1 - P(t))^2*P(t)^3 + 2*(1 - P(t))^3*P(t)^2
# 2) Расчет надежности R1(t) методом разложения по ключевому элементу (мостику):
R1(t) := P(t)*(1 - (1 - P(t))^2)^2 + (1 - P(t))*(1 - (1 - P(t)^2)^2)
# График сопоставления точных методов расчета R(t) и R1(t):
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# Примечание: Графики функций R(t) и R1(t) полностью совпадают на всем интервале времени.
## 3. Приближенные оценки надежности (методы минимальных путей и минимальных сечений)
# Оценка надежности сверху по методу минимальных путей успешного функционирования Pверх(t):
Pверх(t) := 1 - (1 - P(t)^2)^2*(1 - P(t)^3)^2
# Оценка надежности снизу по методу минимальных сечений отказов Pнижн(t):
Pнижн(t) := (1 - Q(t)^2)^2*(1 - Q(t)^3)^2
# Дополнительные промежуточные границы для подсистем Pв2(t) и Pн2(t):
Pв2(t) := (1 - Q(t)^2)^2
Pн2(t) := 1 - (1 - P(t)^2)^2
# Сравнительный график границ надежности системы (Pверх, Pнижн, Pв2, Pн2):
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# Вывод: Точная вероятность безотказной работы R(t) надежно заключена между нижней и верхней границами: Pнижн(t) ≤ R(t) ≤ Pверх(t).
