## Лабораторная работа №2. Две связанные системы
λ := 10^-4
μ := 1.0
## 1. Расчет первой системы
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Given
-5*λ*P1 + μ*P2 + μ*P5 == 0
-(4*λ + μ)*P2 + 3*λ*P1 + μ*P3 + μ*P6 == 0
-(3*λ + μ)*P3 + 2*λ*P2 + μ*P4 + μ*P7 == 0
-(2*λ + μ)*P4 + 1*λ*P3 + μ*P8 == 0
-(4*λ + μ)*P5 + 2*λ*P1 + μ*P6 + μ*P9 == 0
-(3*λ + 2*μ)*P6 + 2*λ*P2 + 3*λ*P5 + μ*P7 + μ*P10 == 0
-(2*λ + 2*μ)*P7 + 2*λ*P3 + 2*λ*P6 + μ*P8 + μ*P11 == 0
-(1*λ + 2*μ)*P8 + 2*λ*P4 + 1*λ*P7 + μ*P12 == 0
-μ*P9 + 1*λ*P5 == 0
-μ*P10 + 1*λ*P6 == 0
-μ*P11 + 1*λ*P7 == 0
P1 + P2 + P3 + P4 + P5 + P6 + P7 + P8 + P9 + P10 + P11 + P12 == 1
a := Find(P1, P2, P3, P4, P5, P6, P7, P8, P9, P10, P11, P12) → [0.999500109991; 0.000299850032997; 5.99700065995e-8; 5.99700065995e-12; 0.000199900021998; 5.99700065995e-8; 1.19940013199e-11; 1.19940013199e-15; 1.99900021998e-8; 5.99700065995e-12; 1.19940013199e-15; 1.19940013199e-19]
K1 := sum(a[i], i = 0 .. 2) + sum(a[j], j = 4 .. 6) = 1
Pfull := a[0]
μ2 := Pfull*μ
μ2 = 0.9995
## 2. Расчет второй системы (восстановление с интенсивностью P1*μ)
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Given
-5*λ*B0 + μ2*B1 + μ2*B3 == 0
-(4*λ + μ2)*B1 + 3*λ*B0 + μ2*B2 + μ2*B4 == 0
-(3*λ + μ2)*B2 + 2*λ*B1 + μ2*B6 + μ2*B5 == 0
-(2*λ + μ2)*B6 + 1*λ*B2 + μ2*B7 == 0
-(4*λ + μ2)*B3 + 2*λ*B0 + μ2*B4 + μ2*B8 == 0
-(3*λ + 2*μ2)*B4 + 2*λ*B1 + 3*λ*B3 + μ2*B5 + μ2*B9 == 0
-(2*λ + 2*μ2)*B5 + 2*λ*B2 + 2*λ*B4 + μ2*B7 + μ2*B10 == 0
-(1*λ + 2*μ2)*B7 + 2*λ*B6 + 1*λ*B5 + μ2*B11 == 0
-μ2*B8 + 1*λ*B3 == 0
-μ2*B9 + 1*λ*B4 == 0
-μ2*B10 + 1*λ*B5 == 0
B0 + B1 + B2 + B3 + B4 + B5 + B6 + B7 + B8 + B9 + B10 + B11 == 1
b := Find(B0, B1, B2, B3, B4, B5, B6, B7, B8, B9, B10, B11) → [0.099499860031; 0.000299999860093; 6.00299870186e-8; 0.0002; 6.00299870186e-8; 1.20120034057e-11; 6.00599920239e-12; 1.20180094117e-15; 2.0010008004e-8; 6.00599920239e-12; 1.20180094117e-15; 1.20240166206e-19]
K2 := sum(b[k], k = 0 .. 5) = 1
## 3. Общий коэффициент готовности комплекса систем
Kобщ := K1*K2 = 1
Kп_общ := 1 - Kобщ = 4.0024e-8
