# Title: Лабораторная работа №3. Расчет надежности системы с приоритетным восстановлением
## Лабораторная работа №3. Исследование надежности системы с приоритетным обслуживанием
# Выполнили студенты: Ястребов-Амирханов Алекси, Ваганова Мария
# Факультет ПИиКТ, группа Р3332
# Цель работы: расчет стационарных вероятностей состояний марковской модели вычислительного комплекса (2 коммутатора, 4 сервера) с приоритетом восстановления по коммутатору и определение общего коэффициента готовности комплекса.
## 1. Исходные параметры надежности элементов комплекса
# Зададим интенсивности отказов (λ) и восстановления (μ) для коммутаторов (индекс 1) и серверов (индекс 2):
# Параметры коммутаторов (отказ λ1, восстановление μ1):
λ1 := 10^-4
μ1 := 1.0
# Параметры серверов (отказ λ2, восстановление μ2):
λ2 := 2*(10^-4)
μ2 := 1.0/2
## 2. Марковская модель надежности и граф состояний
# Комплекс содержит 2 коммутатора и 4 сервера. Коммутаторы имеют абсолютный приоритет при обслуживании ремонтным органом. Состояния системы кодируются вектором (P0..P14):
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# Работоспособными являются состояния, в которых функционирует хотя бы один коммутатор и не менее двух серверов (состояния P0...P7).
## 3. Составление и решение системы уравнений Колмогорова (первая система)
# Для стационарного режима составляем систему алгебраических уравнений баланса вероятностей (Given):
Given
## 3.1. Уравнения баланса при 0 отказавших серверах (состояния P0, P1, P8):
-(2*λ1 + 4*λ2)*P0 + μ1*P1 + μ2*P2 == 0
-(μ1 + λ1 + 4*λ2)*P1 + μ1*P8 + 2*λ1*P0 == 0
-(μ1 + 4*λ2)*P8 + λ1*P1 == 0
## 3.2. Уравнения баланса при 1 отказавшем сервере (состояния P2, P3, P9):
-(μ2 + 2*λ1 + 3*λ2)*P2 + μ1*P3 + 4*λ2*P0 + μ2*P4 == 0
-(μ1 + 1*λ1 + 3*λ2)*P3 + μ1*P9 + 4*λ2*P1 + 2*λ1*P2 == 0
-(μ1 + 3*λ2)*P9 + 4*λ2*P8 + 1*λ1*P3 == 0
## 3.3. Уравнения баланса при 2 отказавших серверах (состояния P4, P5, P10):
-(μ2 + 2*λ1 + 2*λ2)*P4 + μ1*P5 + 3*λ2*P2 + μ2*P6 == 0
-(μ1 + 1*λ1 + 2*λ2)*P5 + μ1*P10 + 3*λ2*P3 + 2*λ1*P4 == 0
-(μ1 + 2*λ2)*P10 + 3*λ2*P9 + 1*λ1*P5 == 0
## 3.4. Уравнения баланса при 3 отказавших серверах (состояния P6, P11):
-(μ2 + 2*λ1 + 1*λ2)*P6 + μ1*P7 + 2*λ2*P4 + μ2*P12 == 0
-(μ1 + 1*λ2)*P11 + 2*λ2*P10 + 1*λ1*P7 == 0
## 3.5. Уравнения баланса при 4 отказавших серверах (состояния P12, P13, P14):
-(μ2 + 2*λ1)*P12 + μ1*P13 + 1*λ2*P6 == 0
-(μ1 + 1*λ1)*P13 + μ1*P14 + 1*λ2*P7 + 2*λ1*P12 == 0
-μ1*P14 + 1*λ2*P11 + 1*λ1*P13 == 0
## 3.6. Условие нормировки полной группы вероятностей:
P0 + P1 + P2 + P3 + P4 + P5 + P6 + P7 + P8 + P9 + P10 + P11 + P12 + P13 + P14 == 1
## 4. Решение системы и расчет коэффициента готовности K1
# Вектор стационарных вероятностей состояний первой системы (P0...P14):
a := Find(P0, P1, P2, P3, P4, P5, P6, P7, P8, P9, P10, P11, P12, P13, P14) → [0.998200660704; 0.00019948053177; 0.00159744025787; 4.78801103741e-7; 1.91750294731e-6; 6.70551261602e-10; 1.53453888309e-9; 5.75055364476e-13; 1.9932107491e-8; 6.37875238525e-11; 1.05285526261e-13; 9.95998269867e-17; 6.14045615221e-13; 2.37840115905e-16; 4.37039769878e-20]
# Коэффициент готовности первой системы K1 (сумма вероятностей работоспособных состояний P0...P7):
K1 := sum(a[i], i = 0 .. 7) = 1
## 5. Корректировка интенсивностей восстановления серверов
# Поскольку приоритет восстановления отдан коммутаторам, серверы восстанавливаются только тогда, когда оба коммутатора исправны (доля времени a0). Скорректированные интенсивности:
μ1x := μ1*a[0]
μ2x := μ2*a[0]
## 6. Система уравнений для второй системы (вероятности B0...B14)
# Составляем систему уравнений со скорректированными интенсивностями обслуживания (Given):
Given
## 6.1. Уравнения баланса при 0 отказавших серверах (состояния B0, B1, B8):
-(2*λ1 + 4*λ2)*B0 + μ1x*B1 + μ2x*B2 == 0
-(μ1x + λ1 + 4*λ2)*B1 + μ1x*B8 + 2*λ1*B0 == 0
-(μ1x + 4*λ2)*B8 + λ1*B1 == 0
## 6.2. Уравнения баланса при 1 отказавшем сервере (состояния B2, B3, B9):
-(μ2x + 2*λ1 + 3*λ2)*B2 + μ1x*B3 + 4*λ2*B0 + μ2x*B4 == 0
-(μ1x + 1*λ1 + 3*λ2)*B3 + μ1x*B9 + 4*λ2*B1 + 2*λ1*B2 == 0
-(μ1x + 3*λ2)*B9 + 4*λ2*B8 + 1*λ1*B3 == 0
## 6.3. Уравнения баланса при 2 отказавших серверах (состояния B4, B5, B10):
-(μ2x + 2*λ1 + 2*λ2)*B4 + μ1x*B5 + 3*λ2*B2 + μ2x*B6 == 0
-(μ1x + 1*λ1 + 2*λ2)*B5 + μ1x*B10 + 3*λ2*B3 + 2*λ1*B4 == 0
-(μ1x + 2*λ2)*B10 + 3*λ2*B9 + 1*λ1*B5 == 0
## 6.4. Уравнения баланса при 3 отказавших серверах (состояния B6, B11):
-(μ2x + 2*λ1 + 1*λ2)*B6 + μ1x*B7 + 2*λ2*B4 + μ2x*B12 == 0
-(μ1x + 1*λ2)*B11 + 2*λ2*B10 + 1*λ1*B7 == 0
## 6.5. Уравнения баланса при 4 отказавших серверах (состояния B12, B13, B14):
-(μ2x + 2*λ1)*B12 + μ1x*B13 + 1*λ2*B6 == 0
-(μ1x + 1*λ1)*B13 + μ1x*B14 + 1*λ2*B7 + 2*λ1*B12 == 0
-μ1x*B14 + 1*λ2*B11 + 1*λ1*B13 == 0
## 6.6. Условие нормировки полной группы вероятностей:
B0 + B1 + B2 + B3 + B4 + B5 + B6 + B7 + B8 + B9 + B10 + B11 + B12 + B13 + B14 == 1
# Вектор стационарных вероятностей состояний второй системы (B0...B14):
b := Find(B0, B1, B2, B3, B4, B5, B6, B7, B8, B9, B10, B11, B12, B13, B14) → [0.99819741844; 0.000199839174825; 0.00160031515413; 4.80526649828e-7; 1.92441757406e-6; 6.74181350372e-10; 1.54284959908e-9; 5.79211213581e-13; 2.0003908174e-8; 6.41327083993e-11; 1.06046154628e-13; 1.00500317316e-16; 6.18484427651e-13; 2.39991053643e-16; 4.41786612287e-20]
## 7. Расчет показателей готовности K2 и результирующего коэффициента комплекса K
# Коэффициент готовности второй системы K2 (сумма вероятностей состояний B0...B7):
K2 := sum(b[i], i = 0 .. 7) = 1
# Общий коэффициент готовности комплекса взаимодействующих систем (K = K1 * K2):
K := K1*K2 = 1
## 8. Выводы по результатам работы
# 1. Сформирована модель марковского процесса для вычислительного комплекса (2 коммутатора, 4 сервера) с приоритетом обслуживания коммутаторов.
# 2. Решением систем уравнений Колмогорова получены векторы стационарных вероятностей состояний a (исходная модель) и b (скорректированная модель).
# 3. Рассчитаны коэффициенты готовности подсистем: K1 = 0.99999998, K2 = 0.99999998. Результирующий коэффициент готовности комплекса составляет K = 0.99999996.
# 4. Архитектура с дублированием коммутаторов и приоритетным ремонтом обеспечивает крайне высокую надежность функционирования комплекса.
