# Title: Лабораторная работа №4. Приближенный метод расчета надежности системы с приоритетным обслуживанием
## Лабораторная работа №4. Приближенный метод расчета надежности системы с приоритетным обслуживанием
# Выполнили студенты: Ястребов-Амирханов Алекси, Ваганова Мария
# Факультет ПИиКТ, группа Р3332
# Цель работы: исследование приближенного инженерного метода декомпозиции для расчета показателей надежности вычислительного комплекса с приоритетным восстановлением коммутаторов и анализ зависимостей коэффициентов готовности от параметров системы.
## 1. Исходные параметры модели и диапазоны варьирования
# Исследуется вычислительный комплекс из n1 коммутаторов и n2 серверов. Приоритетом на восстановление обладают коммутаторы. Зададим диапазоны параметров α, n2 и базовое число коммутаторов n1 = 2:
# Коэффициент α:
α := 0.2, 0.4, 1, 1.5, 2
n2 := 2 .. 20  # Число серверов n2:
n1 := 2  # Число коммутаторов n1:
# Интенсивности отказов (λ) и восстановления (μ) для коммутаторов и серверов (1/ч):
λ1 := 10^-4
λ2(α) := α*λ1
μ1 := 1.0
μ2(α) := μ1/α
# Обоснование фиксации числа коммутаторов: на базовом этапе количество коммутаторов фиксировано (n1 = 2), так как в реальных сетях пара коммутаторов обеспечивает необходимое дублирование. Наращивание числа коммутаторов при небольшом числе серверов усложняет инфраструктуру без пропорционального роста надежности.
## 2. Граф состояний и переходов марковской модели
# Пример графа состояний и переходов системы для случая n1 = 2 коммутаторов и n2 = 4 серверов:
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## 3. Расчет характеристик надежности подсистемы коммутаторов
# В силу приоритета восстановления функционирование коммутаторов не зависит от состояния серверов.
# Вероятность исправного состояния всех коммутаторов P0:
P0 := sum((λ1/μ1)^k*n1!/(n1 - k)!, k = 0 .. n1)^-1 = 0.9998
# Вероятность неисправности ровно k коммутаторов P(k):
P(k) := P0*(λ1/μ1)^k*n1!/(n1 - k)!
# Коэффициент готовности подсистемы коммутаторов Kком (исправен хотя бы 1 коммутатор):
Kком := sum(P(k), k = 0 .. n1 - 1)
## 4. Расчет показателей надежности подсистемы серверов методом декомпозиции
# Вспомогательный параметр загрузки серверов с учетом занятости восстанавливающего органа r2(α):
r2(α) := λ2(α)/(μ2(α)*P0)
# Вероятность исправности всех n2 серверов B0(n2, α):
B0(n2, α) := sum(r2(α)^k*n2!/(n2 - k)!, k = 0 .. n2)^-1
# Вероятность отказа ровно k серверов B(n2, α, k):
B(n2, α, k) := B0(n2, α)*r2(α)^k*n2!/(n2 - k)!
# Коэффициент готовности серверов Kсер (исправно не менее двух серверов):
Kсер(n2, α) := sum(B(n2, α, k), k = 0 .. n2 - 1)
## 5. Результирующий коэффициент готовности комплекса и сравнение с ЛР №3
# Общий коэффициент готовности комплекса взаимосвязанных систем K1(n2, α) = Kком · Kсер(n2, α):
K1(n2, α) := Kком*Kсер(n2, α)
# Значение коэффициента готовности для параметров ЛР №3 (n2 = 4, α = 2):
K1(4, 2) = 1
# Сопоставление со значением, полученным в лабораторной работе №3:
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# Анализ точности: полученное значение K1 ≈ 0.999999980003 незначительно выше точного решения из ЛР №3 (K ≈ 0.999999959935). Разница составляет менее 2·10^-8 (0.000002%), что обусловлено погрешностью декомпозиционного метода приближенного расчета, позволяющего обойтись без решения громоздкой системы алгебраических уравнений высокого порядка.
## 6. Графики зависимости коэффициента готовности K1 от числа серверов n2
# Семейство кривых коэффициента готовности системы K1(n2, α) в зависимости от числа серверов при различных значениях α:
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## 7. Исследование характеристик при повышенной интенсивности отказов (λ1 = 0.1 1/ч)
# При малых интенсивностях отказов (λ1 = 10^-4 1/ч) надежность близка к единице, и разницу заметить сложно. Увеличим интенсивность отказов коммутатора до λ1 = 0.1 1/ч и исследуем систему при переменном числе коммутаторов n1 (от 2 до 30) при постоянном числе серверов n2:
# Коэффициент α:
α := 0.2, 0.4, 1, 1.5, 2
n2 := 2 .. 20  # Число серверов n2:
n1 := 2 .. 30  # Число коммутаторов n1:
# Скорректированные параметры потоков отказов и восстановления:
λ1 := 10^-1
λ2(α) := α*λ1
μ1 := 1
μ2(α) := μ1/α
# Вероятность исправности всех коммутаторов P0(n1):
P0(n1) := sum((λ1/μ1)^k*n1!/(n1 - k)!, k = 0 .. n1)^-1
# Вероятность неисправности ровно k коммутаторов P(n1, k):
P(n1, k) := P0(n1)*(λ1/μ1)^k*n1!/(n1 - k)!
# Коэффициент готовности коммутаторов Kком(n1):
Kком(n1) := sum(P(n1, k), k = 0 .. n1 - 1)
# Скорректированный параметр нагрузки серверов r2(n1, α):
r2(n1, α) := λ2(α)/(μ2(α)*P0(n1))
# Вероятность исправности всех серверов B0(n1, n2, α):
B0(n1, n2, α) := sum(r2(n1, α)^k*n2!/(n2 - k)!, k = 0 .. n2)^-1
# Вероятность отказа ровно k серверов B(n1, n2, α, k):
B(n1, n2, α, k) := B0(n1, n2, α)*r2(n1, α)^k*n2!/(n2 - k)!
# Коэффициент готовности подсистемы серверов Kсер(n1, n2, α):
Kсер(n1, n2, α) := sum(B(n1, n2, α, k), k = 0 .. n2 - 1)
# Общий коэффициент готовности комплекса K1(n1, n2, α):
K1(n1, n2, α) := Kком(n1)*Kсер(n1, n2, α)
# Контрольное значение готовности комплекса при n1 = 2, n2 = 4, α = 2:
K1(2, 4, 2) = 0.84919
## 8. Графический анализ надежности при варьировании числа коммутаторов n1
# Зависимость готовности коммутаторов Kком(n1) и готовности комплекса K1(n1, 4, 2) от числа коммутаторов n1:
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# Зависимость готовности серверов Kсер(n1, 4, α) от числа коммутаторов n1 при различных α:
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## 9. Выводы по результатам работы
# 1. Применение инженерного метода декомпозиции позволило определить стационарные показатели надежности комплекса с абсолютным приоритетом коммутаторов без необходимости формирования и решения полной системы из 15 дифференциальных уравнений Колмогорова.
# 2. Сопоставление с точным решением из ЛР №3 подтвердило высокую точность приближенного метода: расхождение составило менее 2·10^-8 (0.000002%).
# 3. При увеличении числа коммутаторов n1 выше определенного предела (порядка 20-25) общий коэффициент готовности системы снижается. Это обусловлено тем, что суммарный поток отказов коммутаторов растет пропорционально n1. Поскольку коммутаторы имеют безусловный приоритет восстановления, ремонтный орган монополизируется ремонтом коммутаторов, а восстановление серверов блокируется, что снижает общую готовность комплекса.
